# OpenSim document version 40600
Model RatHindlimbRight:
  gravity: 0 -9.80665 0
  credits: Model authors names..
  publications: List of publications related to model...
  length_units: mm
  force_units: N
  Ground: meshes=ground.stl
  BodySet:
    Body spine: mass=0.12 [kg] mass_center=(0 0 0) inertia=(4.8e-6 4.8e-6 4.8e-6 0 0 0) meshes=spine.stl
    Body pelvis_r: mass=0.02 mass_center=(0 0 0) inertia=(4e-6 3.5e-6 3.5e-6 0 0 0) meshes=pelvis_r.stl
    Body femur_r: mass=0.02 mass_center=(0 -0.015 0) inertia=(1.62e-6 2.5e-7 1.62e-6 0 0 0) meshes=femur_r.stl
    Body tibia_r: mass=0.02 mass_center=(0 0.015 0) inertia=(1.62e-6 2.5e-7 1.62e-6 0 0 0) meshes=tibia_r.stl
    Body foot_r: mass=0.02 mass_center=(0.007 -0.005 0) inertia=(2.5e-7 1.62e-6 1.62e-6 0 0 0) meshes=foot_r.stl
    Body pelvis_l: mass=0.02 mass_center=(0 0 0) inertia=(4e-6 3.5e-6 3.5e-6 0 0 0) meshes=pelvis_r.stl
    Body femur_l: mass=0.02 mass_center=(0 -0.015 0) inertia=(1.62e-6 2.5e-7 1.62e-6 0 0 0) meshes=femur_r.stl
    Body tibia_l: mass=0.02 mass_center=(0 0.015 0) inertia=(1.62e-6 2.5e-7 1.62e-6 0 0 0) meshes=tibia_r.stl
    Body foot_l: mass=0.02 mass_center=(0.007 -0.005 0) inertia=(2.5e-7 1.62e-6 1.62e-6 0 0 0) meshes=foot_r.stl
  JointSet:
    CustomJoint ground_spine: socket_parent_frame=ground_offset socket_child_frame=spine_offset
      Coordinate sacrum_pitch: default_value=0.5235988 range=(-1.570796 1.570796) clamped=true
      Coordinate sacrum_roll: default_value=0 range=(-1.570796 1.570796) clamped=true
      Coordinate sacrum_yaw: default_value=0 range=(-1.570796 1.570796) clamped=true
      Coordinate sacrum_x: default_value=0 range=(-0.1 0.25) clamped=true
      Coordinate sacrum_y: default_value=0.05 range=(0 0.2) clamped=true
      Coordinate sacrum_z: default_value=0 range=(-0.1 0.1) clamped=true
      PhysicalOffsetFrame ground_offset: socket_parent=/ground translation=(0 0 0) [meters]
      PhysicalOffsetFrame spine_offset: socket_parent=/bodyset/spine translation=(0 0 0)
      SpatialTransform:
        TransformAxis rotation1: coordinates=sacrum_pitch axis=(0 0 1) LinearFunction(coefficients=1 0)
        TransformAxis rotation2: coordinates=sacrum_roll axis=(1 0 0) LinearFunction(coefficients=1 0)
        TransformAxis rotation3: coordinates=sacrum_yaw axis=(0 1 0) LinearFunction(coefficients=1 0)
        TransformAxis translation1: coordinates=sacrum_x axis=(1 0 0) LinearFunction(coefficients=1 0)
        TransformAxis translation2: coordinates=sacrum_y axis=(0 1 0) LinearFunction(coefficients=1 0)
        TransformAxis translation3: coordinates=sacrum_z axis=(0 0 1) LinearFunction(coefficients=1 0)
    CustomJoint sacroiliac_r: socket_parent_frame=spine_offset socket_child_frame=pelvis_r_offset
      Coordinate sacroiliac_r_flx: default_value=0.06457718 range=(-0.02301246 0.1515205) clamped=true locked=true
      PhysicalOffsetFrame spine_offset: socket_parent=/bodyset/spine translation=(0.005 -0.003 0.01)
      PhysicalOffsetFrame pelvis_r_offset: socket_parent=/bodyset/pelvis_r translation=(0 0 0)
      SpatialTransform: axes_held_at_zero=(rotation2 rotation3 translation1 translation2 translation3)
        TransformAxis rotation1: coordinates=sacroiliac_r_flx axis=(0 0 1) LinearFunction(coefficients=1 0)
    CustomJoint hip_r: socket_parent_frame=pelvis_r_offset socket_child_frame=femur_r_offset
      Coordinate hip_r_flx: default_value=0.6981317 range=(-0.8726646 1.22173) clamped=true
      Coordinate hip_r_add: default_value=-0.1745329 range=(-0.8726646 0.3490659) clamped=true
      Coordinate hip_r_int: default_value=0 range=(-0.8726646 0.6981317) clamped=true
      PhysicalOffsetFrame pelvis_r_offset: socket_parent=/bodyset/pelvis_r translation=(0 0 0)
      PhysicalOffsetFrame femur_r_offset: socket_parent=/bodyset/femur_r translation=(0 0 0)
      SpatialTransform: axes_held_at_zero=(translation1 translation2 translation3)
        TransformAxis rotation1: coordinates=hip_r_flx axis=(0 0 1) LinearFunction(coefficients=1 0)
        TransformAxis rotation2: coordinates=hip_r_add axis=(1 0 0) LinearFunction(coefficients=1 0)
        TransformAxis rotation3: coordinates=hip_r_int axis=(0 1 0) LinearFunction(coefficients=1 0)
    CustomJoint knee_r: socket_parent_frame=femur_r_offset socket_child_frame=tibia_r_offset
      Coordinate knee_r_flx: default_value=-2.094395 range=(-2.617994 -0.3490659) clamped=true
      PhysicalOffsetFrame femur_r_offset: socket_parent=/bodyset/femur_r translation=(0 0 0)
      PhysicalOffsetFrame tibia_r_offset: socket_parent=/bodyset/tibia_r translation=(-0.00057 0.0399598 0.0038162)
      SpatialTransform:
        TransformAxis rotation1: coordinates=knee_r_flx axis=(0 0 1) LinearFunction(coefficients=1 0)
        TransformAxis rotation2: coordinates=knee_r_flx axis=(1 0 0)
          SimmSpline: x=(-2.61799 -2.44346 -2.26893 -2.0944 -1.91986 -1.74533 -1.5708 -1.39626 -1.22173 -1.0472 -0.872665 -0.698132 -0.523599 -0.349066)
              y=(-0.0872665 -0.0750492 -0.0645772 -0.0523599 -0.0401426 -0.0296706 -0.0174533 -0.00523599 0.00523599 0.0174533 0.0296706 0.0401426 0.0523599 0.0645772)
        TransformAxis rotation3: coordinates=knee_r_flx axis=(0 1 0) Constant(value=0.261799)
        TransformAxis translation1: coordinates=knee_r_flx axis=(1 0 0)
          SimmSpline: x=(-2.61799 -2.44346 -2.26893 -2.0944 -1.91986 -1.74533 -1.5708 -1.39626 -1.22173 -1.0472 -0.872665 -0.698132 -0.523599 -0.349066)
              y=(-0.00523853 -0.00464648 -0.00404257 -0.00347254 -0.00297965 -0.00259079 -0.00229943 -0.00211001 -0.00199564 -0.00193207 -0.00187048 -0.00177935 -0.00163827 -0.0014134)
        TransformAxis translation2: coordinates=knee_r_flx axis=(0 1 0)
          SimmSpline: x=(-2.61799 -2.44346 -2.26893 -2.0944 -1.91986 -1.74533 -1.5708 -1.39626 -1.22173 -1.0472 -0.872665 -0.698132 -0.523599 -0.349066)
              y=(-0.0341684 -0.0342539 -0.0341856 -0.0339723 -0.0336511 -0.0332785 -0.0328898 -0.0325504 -0.0322825 -0.0321161 -0.0320632 -0.0321105 -0.0322397 -0.0324144)
        TransformAxis translation3: coordinates=knee_r_flx axis=(0 0 1)
          SimmSpline: x=(-2.61799 -2.44346 -2.26893 -2.0944 -1.91986 -1.74533 -1.5708 -1.39626 -1.22173 -1.0472 -0.872665 -0.698132 -0.523599 -0.349066)
              y=(0.00260302 0.00280341 0.00285365 0.00290375 0.00289358 0.00277318 0.00270235 0.00261105 0.0024695 0.00241714 0.0024041 0.0023809 0.00249641 0.00269104)
    CustomJoint ankle_r: socket_parent_frame=tibia_r_offset socket_child_frame=foot_r_offset
      Coordinate ankle_r_flx: default_value=0.8726646 range=(-0.5235988 1.047198) clamped=true
      Coordinate ankle_r_add: default_value=-0.08726646 range=(-0.08726646 0.6108652) clamped=true locked=true
      Coordinate ankle_r_int: default_value=0 range=(-0.8726646 0.2617994) clamped=true locked=true
      PhysicalOffsetFrame tibia_r_offset: socket_parent=/bodyset/tibia_r translation=(0 0 0)
      PhysicalOffsetFrame foot_r_offset: socket_parent=/bodyset/foot_r translation=(0 0 0)
      SpatialTransform:
        TransformAxis rotation1: coordinates=ankle_r_flx axis=(0 0 1) LinearFunction(coefficients=1 0)
        TransformAxis rotation2: coordinates=ankle_r_add axis=(1 0 0) LinearFunction(coefficients=1 0)
        TransformAxis rotation3: coordinates=ankle_r_int axis=(0 1 0) LinearFunction(coefficients=1 0)
        TransformAxis translation1: coordinates=ankle_r_flx axis=(1 0 0)
          SimmSpline: x=(-0.523599 -0.349066 -0.174533 0 0.174533 0.349066 0.523599 0.698132 0.872665 1.0472)
              y=(0 0 0 0 0 0 0 0 0 0)
        TransformAxis translation2: coordinates=ankle_r_flx axis=(0 1 0)
          SimmSpline: x=(-0.523599 -0.349066 -0.174533 0 0.174533 0.349066 0.523599 0.698132 0.872665 1.0472)
              y=(0 0 0 0 0 0 0 0 0 0)
        TransformAxis translation3: coordinates=ankle_r_flx axis=(0 0 1)
          SimmSpline: x=(-0.523599 -0.349066 -0.174533 0 0.174533 0.349066 0.523599 0.698132 0.872665 1.0472)
              y=(0 0 0 0 0 0 0 0 0 0)
    CustomJoint sacroiliac_l: socket_parent_frame=spine_offset socket_child_frame=pelvis_l_offset
      Coordinate sacroiliac_l_flx: default_value=0.06457718 range=(-0.02301246 0.1515205) clamped=true locked=true
      PhysicalOffsetFrame spine_offset: socket_parent=/bodyset/spine translation=(0.005 -0.003 -0.01)
      PhysicalOffsetFrame pelvis_l_offset: socket_parent=/bodyset/pelvis_l translation=(0 0 0)
      SpatialTransform: axes_held_at_zero=(rotation2 rotation3 translation1 translation2 translation3)
        TransformAxis rotation1: coordinates=sacroiliac_l_flx axis=(0 0 1) LinearFunction(coefficients=1 0)
    CustomJoint hip_l: socket_parent_frame=pelvis_l_offset socket_child_frame=femur_l_offset
      Coordinate hip_l_flx: default_value=0.6981317 range=(-0.8726646 1.22173) clamped=true
      Coordinate hip_l_add: default_value=-0.1745329 range=(-0.8726646 0.3490659) clamped=true
      Coordinate hip_l_int: default_value=0 range=(-0.8726646 0.6981317) clamped=true
      PhysicalOffsetFrame pelvis_l_offset: socket_parent=/bodyset/pelvis_l translation=(0 0 0)
      PhysicalOffsetFrame femur_l_offset: socket_parent=/bodyset/femur_l translation=(0 0 0)
      SpatialTransform: axes_held_at_zero=(translation1 translation2 translation3)
        TransformAxis rotation1: coordinates=hip_l_flx axis=(0 0 1) LinearFunction(coefficients=1 0)
        TransformAxis rotation2: coordinates=hip_l_add axis=(1 0 0) LinearFunction(coefficients=-1 0)
        TransformAxis rotation3: coordinates=hip_l_int axis=(0 1 0) LinearFunction(coefficients=-1 0)
    CustomJoint knee_l: socket_parent_frame=femur_l_offset socket_child_frame=tibia_l_offset
      Coordinate knee_l_flx: default_value=-2.094395 range=(-2.617994 -0.3490659) clamped=true
      PhysicalOffsetFrame femur_l_offset: socket_parent=/bodyset/femur_l translation=(0 0 0)
      PhysicalOffsetFrame tibia_l_offset: socket_parent=/bodyset/tibia_l translation=(-0.00057 0.0399598 -0.0038162)
      SpatialTransform:
        TransformAxis rotation1: coordinates=knee_l_flx axis=(0 0 1) LinearFunction(coefficients=1 0)
        TransformAxis rotation2: coordinates=knee_l_flx axis=(1 0 0)
          SimmSpline: x=(-2.61799 -2.44346 -2.26893 -2.0944 -1.91986 -1.74533 -1.5708 -1.39626 -1.22173 -1.0472 -0.872665 -0.698132 -0.523599 -0.349066)
              y=(0.0872665 0.0750492 0.0645772 0.0523599 0.0401426 0.0296706 0.0174533 0.00523599 -0.00523599 -0.0174533 -0.0296706 -0.0401426 -0.0523599 -0.0645772)
        TransformAxis rotation3: coordinates=knee_l_flx axis=(0 1 0) Constant(value=-0.261799)
        TransformAxis translation1: coordinates=knee_l_flx axis=(1 0 0)
          SimmSpline: x=(-2.61799 -2.44346 -2.26893 -2.0944 -1.91986 -1.74533 -1.5708 -1.39626 -1.22173 -1.0472 -0.872665 -0.698132 -0.523599 -0.349066)
              y=(-0.00523853 -0.00464648 -0.00404257 -0.00347254 -0.00297965 -0.00259079 -0.00229943 -0.00211001 -0.00199564 -0.00193207 -0.00187048 -0.00177935 -0.00163827 -0.0014134)
        TransformAxis translation2: coordinates=knee_l_flx axis=(0 1 0)
          SimmSpline: x=(-2.61799 -2.44346 -2.26893 -2.0944 -1.91986 -1.74533 -1.5708 -1.39626 -1.22173 -1.0472 -0.872665 -0.698132 -0.523599 -0.349066)
              y=(-0.0341684 -0.0342539 -0.0341856 -0.0339723 -0.0336511 -0.0332785 -0.0328898 -0.0325504 -0.0322825 -0.0321161 -0.0320632 -0.0321105 -0.0322397 -0.0324144)
        TransformAxis translation3: coordinates=knee_l_flx axis=(0 0 1)
          SimmSpline: x=(-2.61799 -2.44346 -2.26893 -2.0944 -1.91986 -1.74533 -1.5708 -1.39626 -1.22173 -1.0472 -0.872665 -0.698132 -0.523599 -0.349066)
              y=(-0.00260302 -0.00280341 -0.00285365 -0.00290375 -0.00289358 -0.00277318 -0.00270235 -0.00261105 -0.0024695 -0.00241714 -0.0024041 -0.0023809 -0.00249641 -0.00269104)
    CustomJoint ankle_l: socket_parent_frame=tibia_l_offset socket_child_frame=foot_l_offset
      Coordinate ankle_l_flx: default_value=0.8726646 range=(-0.5235988 1.047198) clamped=true
      Coordinate ankle_l_add: default_value=-0.08726646 range=(-0.08726646 0.6108652) clamped=true locked=true
      Coordinate ankle_l_int: default_value=0 range=(-0.8726646 0.2617994) clamped=true locked=true
      PhysicalOffsetFrame tibia_l_offset: socket_parent=/bodyset/tibia_l translation=(0 0 0)
      PhysicalOffsetFrame foot_l_offset: socket_parent=/bodyset/foot_l translation=(0 0 0)
      SpatialTransform:
        TransformAxis rotation1: coordinates=ankle_l_flx axis=(0 0 1) LinearFunction(coefficients=1 0)
        TransformAxis rotation2: coordinates=ankle_l_add axis=(1 0 0) LinearFunction(coefficients=-1 0)
        TransformAxis rotation3: coordinates=ankle_l_int axis=(0 1 0) LinearFunction(coefficients=-1 0)
        TransformAxis translation1: coordinates=ankle_l_flx axis=(1 0 0)
          SimmSpline: x=(-0.523599 -0.349066 -0.174533 0 0.174533 0.349066 0.523599 0.698132 0.872665 1.0472)
              y=(0 0 0 0 0 0 0 0 0 0)
        TransformAxis translation2: coordinates=ankle_l_flx axis=(0 1 0)
          SimmSpline: x=(-0.523599 -0.349066 -0.174533 0 0.174533 0.349066 0.523599 0.698132 0.872665 1.0472)
              y=(0 0 0 0 0 0 0 0 0 0)
        TransformAxis translation3: coordinates=ankle_l_flx axis=(0 0 1)
          SimmSpline: x=(-0.523599 -0.349066 -0.174533 0 0.174533 0.349066 0.523599 0.698132 0.872665 1.0472)
              y=(0 0 0 0 0 0 0 0 0 0)
  ForceSet:
    ObjectGroup hamstrings
    ObjectGroup hip_r_cuffs
    ObjectGroup hip_r_flexors
    ObjectGroup gluteals
    ObjectGroup adductors
    ObjectGroup quadriceps
    ObjectGroup calf_muscles
    ObjectGroup anterior_crural
    ObjectGroup posterior_crural
    ObjectGroup others
  MarkerSet:
    Marker RASI: pelvis_r (0.028 0.004 0.003)
    Marker RHIP: pelvis_r (-0.001 0.001 0.01)
    Marker RKNE: femur_r (0 -0.035 0.003)
    Marker RANK: tibia_r (0 0 0.004) fixed=true
    Marker RTOE: foot_r (0.015 -0.005 0.005) fixed=true
    Marker TAIL: spine (-0.00797135 0.00775839 0)
    Marker SPL6: spine (0.0306698 0.0151176 0) fixed=true
    Marker LASI: pelvis_l (0.028 0.004 -0.003)
    Marker LHIP: pelvis_l (-0.001 0.001 -0.01)
    Marker LKNE: femur_l (0 -0.035 -0.003)
    Marker LANK: tibia_l (0 0 -0.004) fixed=true
    Marker LTOE: foot_l (0.015 -0.005 -0.005) fixed=true
