# OpenSim document version 40600
ForceSet:
  # Reserve actuators for all 22 coordinates.
  # CMC cost = sum((control_i / optimal_force_i)^2).
  # Sacrum reserves (residuals): high optimal_force because the model
  # has no trunk/forelimb muscles — residuals MUST compensate for
  # body weight (~1.25 N) and missing upper-body torques.
  # Rotational: 1.0 Nm, Translational: 10.0 N.
  # Joint reserves (hip, knee, ankle): low optimal_force (0.1) to
  # penalize reserve usage and push load onto muscles.
  # Sacrum 6-DOF (residuals)
  CoordinateActuator sacrum_pitch_reserve: coordinate=sacrum_pitch optimal_force=1.5
  CoordinateActuator sacrum_roll_reserve: coordinate=sacrum_roll optimal_force=1.5
  CoordinateActuator sacrum_yaw_reserve: coordinate=sacrum_yaw optimal_force=1.5
  CoordinateActuator sacrum_x_reserve: coordinate=sacrum_x optimal_force=10
  CoordinateActuator sacrum_y_reserve: coordinate=sacrum_y optimal_force=10
  CoordinateActuator sacrum_z_reserve: coordinate=sacrum_z optimal_force=10
  # Sacroiliac (locked but need reserves for completeness)
  # Right hip (3 DOF)
  CoordinateActuator hip_r_flx_reserve: coordinate=hip_r_flx optimal_force=0.1
  CoordinateActuator hip_r_add_reserve: coordinate=hip_r_add optimal_force=0.1
  CoordinateActuator hip_r_int_reserve: coordinate=hip_r_int optimal_force=0.1
  # Right knee (1 DOF)
  CoordinateActuator knee_r_flx_reserve: coordinate=knee_r_flx optimal_force=0.1
  # Right ankle (3 DOF — flx active, add+int locked)
  CoordinateActuator ankle_r_flx_reserve: coordinate=ankle_r_flx optimal_force=0.1
  # Left hip (3 DOF)
  CoordinateActuator hip_l_flx_reserve: coordinate=hip_l_flx optimal_force=0.1
  CoordinateActuator hip_l_add_reserve: coordinate=hip_l_add optimal_force=0.1
  CoordinateActuator hip_l_int_reserve: coordinate=hip_l_int optimal_force=0.1
  # Left knee (1 DOF)
  CoordinateActuator knee_l_flx_reserve: coordinate=knee_l_flx optimal_force=0.1
  # Left ankle (3 DOF — flx active, add+int locked)
  CoordinateActuator ankle_l_flx_reserve: coordinate=ankle_l_flx optimal_force=0.1
