# OpenSim document version 40600
ControlSet rat_hindlimb_bilateral_CMC:
  defaults: ControlLinear default: is_model_control=true extrapolate=false default_min=0.02 default_max=1
      use_steps=true
  ControlLinear sacrum_pitch_residual.excitation: default_min=-1000 default_max=1000 use_steps=false
  ControlLinear sacrum_roll_residual.excitation: default_min=-1000 default_max=1000 use_steps=false
  ControlLinear sacrum_yaw_residual.excitation: default_min=-1000 default_max=1000 use_steps=false
  ControlLinear sacrum_x_residual.excitation: default_min=-1000 default_max=1000 use_steps=false
  ControlLinear sacrum_y_residual.excitation: default_min=-1000 default_max=1000 use_steps=false
  ControlLinear sacrum_z_residual.excitation: default_min=-1000 default_max=1000 use_steps=false
  ControlLinear hip_r_flx_reserve.excitation: default_min=-1000 default_max=1000 use_steps=false
  ControlLinear hip_r_add_reserve.excitation: default_min=-1000 default_max=1000 use_steps=false
  ControlLinear hip_r_int_reserve.excitation: default_min=-1000 default_max=1000 use_steps=false
  ControlLinear hip_l_flx_reserve.excitation: default_min=-1000 default_max=1000 use_steps=false
  ControlLinear hip_l_add_reserve.excitation: default_min=-1000 default_max=1000 use_steps=false
  ControlLinear hip_l_int_reserve.excitation: default_min=-1000 default_max=1000 use_steps=false
  ControlLinear knee_r_flx_reserve.excitation: default_min=-1000 default_max=1000 use_steps=false
  ControlLinear knee_l_flx_reserve.excitation: default_min=-1000 default_max=1000 use_steps=false
  ControlLinear ankle_r_flx_reserve.excitation: default_min=-1000 default_max=1000 use_steps=false
  ControlLinear ankle_l_flx_reserve.excitation: default_min=-1000 default_max=1000 use_steps=false
  # Right leg muscles
  ControlLinear R_BFa.excitation
  ControlLinear R_BFp.excitation
  ControlLinear R_CF.excitation
  ControlLinear R_STp.excitation
  ControlLinear R_STa.excitation
  ControlLinear R_SM.excitation
  ControlLinear R_QF.excitation
  ControlLinear R_TFL.excitation
  ControlLinear R_GMa.excitation
  ControlLinear R_GMe.excitation
  ControlLinear R_GMi.excitation
  ControlLinear R_Pir.excitation
  ControlLinear R_GP.excitation
  ControlLinear R_GA.excitation
  ControlLinear R_AL.excitation
  ControlLinear R_AM.excitation
  ControlLinear R_AB.excitation
  ControlLinear R_Pec.excitation
  ControlLinear R_IP.excitation
  ControlLinear R_OE.excitation
  ControlLinear R_OI.excitation
  ControlLinear R_GS.excitation
  ControlLinear R_GI.excitation
  ControlLinear R_RF.excitation
  ControlLinear R_VL.excitation
  ControlLinear R_VI.excitation
  ControlLinear R_VM.excitation
  ControlLinear R_MG.excitation
  ControlLinear R_LG.excitation
  ControlLinear R_Pla.excitation
  ControlLinear R_Sol.excitation
  ControlLinear R_TA.excitation
  ControlLinear R_EDL.excitation
  ControlLinear R_TP.excitation
  ControlLinear R_FDL.excitation
  ControlLinear R_FHL.excitation
  ControlLinear R_Per.excitation
  ControlLinear R_Pop.excitation
  # Left leg muscles
  ControlLinear L_BFa.excitation
  ControlLinear L_BFp.excitation
  ControlLinear L_CF.excitation
  ControlLinear L_STp.excitation
  ControlLinear L_STa.excitation
  ControlLinear L_SM.excitation
  ControlLinear L_QF.excitation
  ControlLinear L_TFL.excitation
  ControlLinear L_GMa.excitation
  ControlLinear L_GMe.excitation
  ControlLinear L_GMi.excitation
  ControlLinear L_Pir.excitation
  ControlLinear L_GP.excitation
  ControlLinear L_GA.excitation
  ControlLinear L_AL.excitation
  ControlLinear L_AM.excitation
  ControlLinear L_AB.excitation
  ControlLinear L_Pec.excitation
  ControlLinear L_IP.excitation
  ControlLinear L_OE.excitation
  ControlLinear L_OI.excitation
  ControlLinear L_GS.excitation
  ControlLinear L_GI.excitation
  ControlLinear L_RF.excitation
  ControlLinear L_VL.excitation
  ControlLinear L_VI.excitation
  ControlLinear L_VM.excitation
  ControlLinear L_MG.excitation
  ControlLinear L_LG.excitation
  ControlLinear L_Pla.excitation
  ControlLinear L_Sol.excitation
  ControlLinear L_TA.excitation
  ControlLinear L_EDL.excitation
  ControlLinear L_TP.excitation
  ControlLinear L_FDL.excitation
  ControlLinear L_FHL.excitation
  ControlLinear L_Per.excitation
  ControlLinear L_Pop.excitation
