# OpenSim document version 40600
ControlSet rat_hindlimb_bilateral_rra:
  defaults: ControlLinear default: is_model_control=true extrapolate=true default_min=-1 default_max=1 use_steps=false
  ControlLinear sacrum_pitch.excitation
  ControlLinear sacrum_roll.excitation
  ControlLinear sacrum_yaw.excitation
  ControlLinear sacrum_x.excitation
  ControlLinear sacrum_y.excitation
  ControlLinear sacrum_z.excitation
  ControlLinear hip_r_flx.excitation
  ControlLinear hip_r_add.excitation
  ControlLinear hip_r_int.excitation
  ControlLinear hip_l_flx.excitation
  ControlLinear hip_l_add.excitation
  ControlLinear hip_l_int.excitation
  ControlLinear knee_r_flx.excitation
  ControlLinear knee_l_flx.excitation
  ControlLinear ankle_r_flx.excitation
  ControlLinear ankle_l_flx.excitation
