# OpenSim document version 40600
CMC_TaskSet:
  CMC_Joint [values shared by the 16 below unless stated]: wrt_body=-1 express_body=-1 active=(true false false)
      kp=(100 1 1) kv=(20 1 1) ka=(1 1 1) r0=(0 0 0) r1=(0 0 0) r2=(0 0 0) limit=0
  CMC_Joint sacrum_x: weight=(10 0 0) coordinate=sacrum_x
  CMC_Joint sacrum_y: weight=(20 0 0) coordinate=sacrum_y
  CMC_Joint sacrum_z: weight=(10 0 0) coordinate=sacrum_z
  CMC_Joint sacrum_pitch: weight=(20 0 0) coordinate=sacrum_pitch
  CMC_Joint sacrum_roll: weight=(10 0 0) coordinate=sacrum_roll
  CMC_Joint sacrum_yaw: weight=(10 0 0) coordinate=sacrum_yaw
  # Right limb joints
  CMC_Joint hip_r_flx: weight=(10 0 0) coordinate=hip_r_flx
  CMC_Joint hip_r_add: weight=(5 0 0) coordinate=hip_r_add
  CMC_Joint hip_r_int: weight=(5 0 0) coordinate=hip_r_int
  CMC_Joint knee_r_flx: weight=(10 0 0) coordinate=knee_r_flx
  CMC_Joint ankle_r_flx: weight=(10 0 0) coordinate=ankle_r_flx
  # Left limb joints
  CMC_Joint hip_l_flx: weight=(10 0 0) coordinate=hip_l_flx
  CMC_Joint hip_l_add: weight=(5 0 0) coordinate=hip_l_add
  CMC_Joint hip_l_int: weight=(5 0 0) coordinate=hip_l_int
  CMC_Joint knee_l_flx: weight=(10 0 0) coordinate=knee_l_flx
  CMC_Joint ankle_l_flx: weight=(10 0 0) coordinate=ankle_l_flx
