# OpenSim document version 40600
JointSet:
  CustomJoint sacroiliac_l: socket_parent_frame=spine_offset socket_child_frame=pelvis_l_offset
    Coordinate sacroiliac_l_flx: default_value=0.06457718 range=(-0.02301246 0.1515205) clamped=true locked=true
    PhysicalOffsetFrame spine_offset: socket_parent=/bodyset/spine translation=(0.005 -0.003 0.01) [meters]
    PhysicalOffsetFrame pelvis_l_offset: socket_parent=/bodyset/pelvis_l translation=(0 0 0)
    SpatialTransform: axes_held_at_zero=(rotation2 rotation3 translation1 translation2 translation3)
      TransformAxis rotation1: coordinates=sacroiliac_l_flx axis=(0 0 1) LinearFunction(coefficients=1 0)
  CustomJoint hip_l: socket_parent_frame=pelvis_l_offset socket_child_frame=femur_l_offset
    Coordinate hip_l_flx: default_value=0.6981317 range=(-0.8726646 1.22173) clamped=true
    Coordinate hip_l_add: default_value=-0.1745329 range=(-0.8726646 0.3490659) clamped=true
    Coordinate hip_l_int: default_value=0 range=(-0.8726646 0.6981317) clamped=true
    PhysicalOffsetFrame pelvis_l_offset: socket_parent=/bodyset/pelvis_l translation=(0 0 0)
    PhysicalOffsetFrame femur_l_offset: socket_parent=/bodyset/femur_l translation=(0 0 0)
    SpatialTransform: axes_held_at_zero=(translation1 translation2 translation3)
      TransformAxis rotation1: coordinates=hip_l_flx axis=(0 0 1) LinearFunction(coefficients=1 0)
      TransformAxis rotation2: coordinates=hip_l_add axis=(1 0 0) LinearFunction(coefficients=1 0)
      TransformAxis rotation3: coordinates=hip_l_int axis=(0 1 0) LinearFunction(coefficients=1 0)
  CustomJoint knee_l: socket_parent_frame=femur_l_offset socket_child_frame=tibia_l_offset
    Coordinate knee_l_flx: default_value=-2.094395 range=(-2.617994 -0.3490659) clamped=true
    PhysicalOffsetFrame femur_l_offset: socket_parent=/bodyset/femur_l translation=(0 0 0)
    PhysicalOffsetFrame tibia_l_offset: socket_parent=/bodyset/tibia_l translation=(-0.00057 0.0399598 0.0038162)
    SpatialTransform:
      TransformAxis rotation1: coordinates=knee_l_flx axis=(0 0 1) LinearFunction(coefficients=1 0)
      TransformAxis rotation2: coordinates=knee_l_flx axis=(1 0 0)
        SimmSpline: x=(-2.61799 -2.44346 -2.26893 -2.0944 -1.91986 -1.74533 -1.5708 -1.39626 -1.22173 -1.0472 -0.872665 -0.698132 -0.523599 -0.349066)
            y=(-0.0872665 -0.0750492 -0.0645772 -0.0523599 -0.0401426 -0.0296706 -0.0174533 -0.00523599 0.00523599 0.0174533 0.0296706 0.0401426 0.0523599 0.0645772)
      TransformAxis rotation3: coordinates=knee_l_flx axis=(0 1 0) Constant(value=0.261799)
      TransformAxis translation1: coordinates=knee_l_flx axis=(1 0 0)
        SimmSpline: x=(-2.61799 -2.44346 -2.26893 -2.0944 -1.91986 -1.74533 -1.5708 -1.39626 -1.22173 -1.0472 -0.872665 -0.698132 -0.523599 -0.349066)
            y=(-0.00523853 -0.00464648 -0.00404257 -0.00347254 -0.00297965 -0.00259079 -0.00229943 -0.00211001 -0.00199564 -0.00193207 -0.00187048 -0.00177935 -0.00163827 -0.0014134)
      TransformAxis translation2: coordinates=knee_l_flx axis=(0 1 0)
        SimmSpline: x=(-2.61799 -2.44346 -2.26893 -2.0944 -1.91986 -1.74533 -1.5708 -1.39626 -1.22173 -1.0472 -0.872665 -0.698132 -0.523599 -0.349066)
            y=(-0.0341684 -0.0342539 -0.0341856 -0.0339723 -0.0336511 -0.0332785 -0.0328898 -0.0325504 -0.0322825 -0.0321161 -0.0320632 -0.0321105 -0.0322397 -0.0324144)
      TransformAxis translation3: coordinates=knee_l_flx axis=(0 0 1)
        SimmSpline: x=(-2.61799 -2.44346 -2.26893 -2.0944 -1.91986 -1.74533 -1.5708 -1.39626 -1.22173 -1.0472 -0.872665 -0.698132 -0.523599 -0.349066)
            y=(0.00260302 0.00280341 0.00285365 0.00290375 0.00289358 0.00277318 0.00270235 0.00261105 0.0024695 0.00241714 0.0024041 0.0023809 0.00249641 0.00269104)
  CustomJoint ankle_l: socket_parent_frame=tibia_l_offset socket_child_frame=foot_l_offset
    Coordinate ankle_l_flx: default_value=0.8726646 range=(-0.5235988 1.047198) clamped=true
    Coordinate ankle_l_add: default_value=-0.08726646 range=(-0.08726646 0.6108652) clamped=true locked=true
    Coordinate ankle_l_int: default_value=0 range=(-0.8726646 0.2617994) clamped=true locked=true
    PhysicalOffsetFrame tibia_l_offset: socket_parent=/bodyset/tibia_l translation=(0 0 0)
    PhysicalOffsetFrame foot_l_offset: socket_parent=/bodyset/foot_l translation=(0 0 0)
    SpatialTransform:
      TransformAxis rotation1: coordinates=ankle_l_flx axis=(0 0 1) LinearFunction(coefficients=1 0)
      TransformAxis rotation2: coordinates=ankle_l_add axis=(1 0 0) LinearFunction(coefficients=1 0)
      TransformAxis rotation3: coordinates=ankle_l_int axis=(0 1 0) LinearFunction(coefficients=1 0)
      TransformAxis translation1: coordinates=ankle_l_flx axis=(1 0 0)
        SimmSpline: x=(-0.523599 -0.349066 -0.174533 0 0.174533 0.349066 0.523599 0.698132 0.872665 1.0472)
            y=(0 0 0 0 0 0 0 0 0 0)
      TransformAxis translation2: coordinates=ankle_l_flx axis=(0 1 0)
        SimmSpline: x=(-0.523599 -0.349066 -0.174533 0 0.174533 0.349066 0.523599 0.698132 0.872665 1.0472)
            y=(0 0 0 0 0 0 0 0 0 0)
      TransformAxis translation3: coordinates=ankle_l_flx axis=(0 0 1)
        SimmSpline: x=(-0.523599 -0.349066 -0.174533 0 0.174533 0.349066 0.523599 0.698132 0.872665 1.0472)
            y=(0 0 0 0 0 0 0 0 0 0)
