# OpenSim document version 40600
ForceSet:
  # Sacrum 6-DOF (residuals)
  CoordinateActuator sacrum_pitch_reserve: coordinate=sacrum_pitch optimal_force=1.5
  CoordinateActuator sacrum_roll_reserve: coordinate=sacrum_roll optimal_force=1.5
  CoordinateActuator sacrum_yaw_reserve: coordinate=sacrum_yaw optimal_force=1.5
  CoordinateActuator sacrum_x_reserve: coordinate=sacrum_x optimal_force=10
  CoordinateActuator sacrum_y_reserve: coordinate=sacrum_y optimal_force=10
  CoordinateActuator sacrum_z_reserve: coordinate=sacrum_z optimal_force=10
  # Sacroiliac (locked but need reserves for completeness)
  # Right hip (3 DOF)
  CoordinateActuator hip_r_flx_reserve: min_control=-1 max_control=1 coordinate=hip_r_flx optimal_force=1000
  CoordinateActuator hip_r_add_reserve: min_control=-1 max_control=1 coordinate=hip_r_add optimal_force=1000
  CoordinateActuator hip_r_int_reserve: min_control=-1 max_control=1 coordinate=hip_r_int optimal_force=1000
  # Right hip joint limit force (safety net)
  # Right knee (1 DOF)
  CoordinateActuator knee_r_flx_reserve: min_control=-1 max_control=1 coordinate=knee_r_flx optimal_force=1000
  # Right knee joint limit force (safety net)
  # Right ankle (3 DOF — flx active, add+int locked)
  CoordinateActuator ankle_r_flx_reserve: min_control=-1 max_control=1 coordinate=ankle_r_flx optimal_force=1000
  # Right ankle joint limit force
  # Prevents ankle from blowing past limits during forward integration.
  # clamped=true does NOT enforce limits in dynamics — this force does.
  # Range: [-30°, 60°]. Stiffness: 10 Nm/deg (1000x peak GRF torque at 1°).
  # Transition: 2° for fast ramp-up. At limit boundary, restoring force = 20 Nm.
  # Left hip (3 DOF)
  CoordinateActuator hip_l_flx_reserve: min_control=-1 max_control=1 coordinate=hip_l_flx optimal_force=1000
  CoordinateActuator hip_l_add_reserve: min_control=-1 max_control=1 coordinate=hip_l_add optimal_force=1000
  CoordinateActuator hip_l_int_reserve: min_control=-1 max_control=1 coordinate=hip_l_int optimal_force=1000
  # Left hip joint limit force (safety net)
  # Left knee (1 DOF)
  CoordinateActuator knee_l_flx_reserve: min_control=-1 max_control=1 coordinate=knee_l_flx optimal_force=1000
  # Left knee joint limit force (safety net)
  # Left ankle (3 DOF — flx active, add+int locked)
  CoordinateActuator ankle_l_flx_reserve: min_control=-1 max_control=1 coordinate=ankle_l_flx optimal_force=1000
  # Left ankle joint limit force
